# Mål utvendig gips
L := 3250 mm
w := 1475 mm
t_utforing := 23 mm  # Distanse frå utvendig gips til profil
w_stairs := 1000 mm  # Bredde på trapp
h := 900 mm  # Minimums høyde til topp rekkverk, TEK17 krav
# Høyde på gulv frå bjelkelag
t_sponplate := 23 mm
t_silencio := 24 mm
t_varmefordeling := 1 mm
t_gips := 13 mm
t_østberg := 8 mm
t_laminat := 10 mm
t_gulv := t_sponplate + t_silencio + t_varmefordeling + t_gips + t_østberg + t_laminat = 79 mm
# Profil dimensjoner
w_profile := 46 mm
h_gProfil := 20 mm  # Gjettet høgde bunn profil til glass
h := 900 mm
# Dimensjoner på glass og avstand mellom glasselementer
g_glass := 10 mm
t_glass := 17.52 mm
d_glassStair := 20 mm  # avstand frå kant trapp inn til glass
# Glass dimensjoner langside
L_glassTotal := L - t_utforing - w_profile/2 + t_glass/2 = 3212.76 mm
L_glassSection := (L_glassTotal - 2*g_glass)/3 = 1064.25 mm
# Glassdimensjoner kortside
w_glass := w - w_stairs + d_glassStair - t_utforing - w_profile/2 - t_glass/2 - 2*g_glass = 420.24 mm
# Profil Lengder
t_toleranse := 3 mm  # Vi kan ha litt toleranser på lengden, i.e glasset kan stikke litt ut av profilen
L_1 := L - t_utforing - t_toleranse = 3224 mm
L_2 := w - w_stairs + d_glassStair - t_utforing - t_toleranse + g_glass = 479 mm
# Høyde på glass
h_gLoper := 25 mm  # Gjettet dybde innfresing i håndløper
h_Loper := 40 mm  # Høyde på håndløper
h_toleranse := 10 mm  # Vi må komme over minimumskravet etter at toleranser er kommet inn i bildet
# Høyde på glass felt på retur rekkverk
h_glass := h + h_toleranse + t_gulv - h_gProfil - h_Loper + h_gLoper = 954 mm
