A := 70 m^2
t := 250 mm
ΔT := 10 K
time := 50 yr
price := 1.5 ¤/(kW*hr)
λ_proff := 0.034 W/(m*K)
Q := A*λ_proff/t*ΔT = 95.2 W
cost_proff := Q*time*price = 62587.9 base_currency
λ_proff := 0.032 W/(m*K)
Q := A*λ_proff/t*ΔT = 89.6 W
cost_extreme := Q*time*price = 58906.3 base_currency
cost_proff - cost_extreme = 3681.64 base_currency
